# Transport; average mix; non-metallic mineral products

Dataset: openLCA process, unit process
Category: 48-49: Transportation and Warehousing / Commodity Transport
Geography: United States of America (the)
Time period: 2017-01-01 to 2017-12-31
Allocation method: physical allocation
Data quality: US EPA - Process Pedigree Matrix (4;1)
Exchange data quality scheme: US EPA - Flow Pedigree Matrix
Generated by: ERG
Owner: US Census Bureau
Published in: ERG (2025) US Average Commodity Transport
restrictionsDescription: The Commodity Flow Survey Public Use File is a work of the United States Government and is therefore not subject to copyright protection under Title 17 U.S.C. §105. This provision states: ‘Copyright protection under this title is not available for any work of the United States Government.’ Accordingly, the data are in the public domain and may be used freely, with attribution recommended for transparency.
These U.S. LCI Database Project data ("Data") are provided by the National Renewable Energy Laboratory ("NREL"), operated by the Alliance for Sustainable Energy, LLC ("Alliance") for the US Department of Energy ("DOE") under Contract No. DE-AC36-08GO28308. The United States Government (the "Government") retains and the user acknowledges that the Government retains a non-exclusive, paid-up, irrevocable, worldwide license to publish or reproduce the published form of these data, or allow others to do so, for Government purposes.
Access to and use of these Data shall impose the following obligations on the user, as set forth in this Agreement. The user is granted the right, without any fee or cost, to use, copy, modify, alter, enhance and distribute these Data for any purpose whatsoever, provided that this entire notice appears in all copies of the Data. Any modification, alteration or enhancement of these data shall be identified and documented by the user. Further, the user agrees to credit the DOE/NREL/Alliance in any publication that results from the use of these Data. The names DOE/NREL/Alliance, however, may not be used in any advertising or publicity to endorse or promote any products or commercial entities unless specific written permission is obtained from DOE/NREL/Alliance. The user also understands that DOE/NREL/Alliance is not obligated to provide the user with any support, consulting, training or assistance of any kind with regard to the use of these Data or to provide the user with any updates, revisions or new versions of these Data.
YOU AGREE TO INDEMNIFY THE GOVERNMENT AND DOE/NREL/ALLIANCE, AND ITS SUBSIDIARIES, AFFILIATES, OFFICERS, AGENTS, AND EMPLOYEES AGAINST ANY CLAIM OR DEMAND, INCLUDING REASONABLE ATTORNEYS' FEES, RELATED TO YOUR USE OF THESE DATA. THESE DATA ARE PROVIDED BY DOE/NREL/ALLIANCE "AS IS" AND ANY EXPRESS OR IMPLIED WARRANTIES, INCLUDING BUT NOT LIMITED TO, THE IMPLIED WARRANTIES OF MERCHANTABILITY AND FITNESS FOR A PARTICULAR PURPOSE ARE DISCLAIMED. IN NO EVENT SHALL THE GOVERNMENT OR DOE/NREL/ALLIANCE BE LIABLE FOR ANY SPECIAL, INDIRECT OR CONSEQUENTIAL DAMAGES OR ANY DAMAGES WHATSOEVER, INCLUDING BUT NOT LIMITED TO CLAIMS ASSOCIATED WITH THE LOSS OF DATA OR PROFITS, WHICH MAY RESULT FROM AN ACTION IN CONTRACT, NEGLIGENCE OR OTHER TORTIOUS CLAIM THAT ARISES OUT OF OR IN CONNECTION WITH THE ACCESS, USE OR PERFORMANCE OF THESE DATA.

## General comment
Average transport distances per transportation mode (i.e. truck, rail, water) for the commodity 'Non-Metallic Mineral Products'. Commodity categories are defined according to the Standard Classification of Transported Goods (SCTG). The SCTG code for 'Non-Metallic Mineral Products' is '31'. Specific commodities that are included in each category can be found in the SCTG Commodity Code Manual which is referenced in the methodology document. The system boundaries for these processes are manufacturing or wholesale gate to consumer. Data are sourced from the 2017 Commodity Flow Survey Public Use File. These data represent U.S. average shipment characteristics per commodity. These data are intended to model transportation of domestically transported and consumed goods. Shipment data for commodities that were ultimately exported from the United States were not included.

## Technology
This data represents the standard transportation technology used in the U.S. for all modes excluding pipeline. The current default provider for pipeline entries represent the transportation of crude petroleum which was selected as a proxy for SCTG Code 20 (Basic Chemicals) and SCTG Code 31 (Non-Metallic Minerals). Currently, there are no pipeline processes in USLCI that specifically relate to chemical or mineral transport.

## Geography
This process represents the average U.S. shipment for the commodity.

## Time period
This process reflects a sample of four weeks of transportation activities, one week per quarter, over the course of 2017.

## Parameters
- SCTG31_lightTruck_dist: 50.22
  km
- SCTG31_lightTruck_mass_frac: 0.622065
  fraction of all commodity shipped by current mode
- SCTG31_lightTruck_kgkm; = SCTG31_lightTruck_dist*SCTG31_lightTruck_mass_frac
  kg*km; average mass distance per shipment
- SCTG31_longHaul_dist: 667.64
  km
- SCTG31_longHaul_mass_frac: 0.348388
  fraction of all commodity shipped by current mode
- SCTG31_longHaul_kgkm; = SCTG31_longHaul_dist*SCTG31_longHaul_mass_frac
  kg*km; average mass distance per shipment
- SCTG31_rail_dist: 601.26
  km
- SCTG31_rail_mass_frac: 0.0259264
  fraction of all commodity shipped by current mode
- SCTG31_rail_kgkm; = SCTG31_rail_dist*SCTG31_rail_mass_frac
  kg*km; average mass distance per shipment
- SCTG31_greatLakes_dist: 421.21
  km
- SCTG31_greatLakes_mass_frac: 0.0017716
  fraction of all commodity shipped by current mode
- SCTG31_greatLakes_kgkm; = SCTG31_greatLakes_dist*SCTG31_greatLakes_mass_frac
  kg*km; average mass distance per shipment
- SCTG31_inlandWater_dist: 899.92
  km
- SCTG31_inlandWater_mass_frac: 0.00121971
  fraction of all commodity shipped by current mode
- SCTG31_inlandWater_kgkm; = SCTG31_inlandWater_dist*SCTG31_inlandWater_mass_frac
  kg*km; average mass distance per shipment
- SCTG31_air_dist: 4323.92
  km
- SCTG31_air_mass_frac: 0.000478857
  fraction of all commodity shipped by current mode
- SCTG31_air_kgkm; = SCTG31_air_dist*SCTG31_air_mass_frac
  kg*km; average mass distance per shipment
- SCTG31_deepSea_dist: 469.4
  km
- SCTG31_deepSea_mass_frac: 0.000131182
  fraction of all commodity shipped by current mode
- SCTG31_deepSea_kgkm; = SCTG31_deepSea_dist*SCTG31_deepSea_mass_frac
  kg*km; average mass distance per shipment
- SCTG31_pipeline_dist: 20.92
  km
- SCTG31_pipeline_mass_frac: 1.98575e-5
  fraction of all commodity shipped by current mode
- SCTG31_pipeline_kgkm; = SCTG31_pipeline_dist*SCTG31_pipeline_mass_frac
  kg*km; average mass distance per shipment

## Reference product
- Commodity transport; at consumer: 1 kg

## Inputs
All rows: data quality (2,3,1,1,3)
- Transport, light commercial truck, diesel powered: 31.2401 kg*km; = SCTG31_lightTruck_kgkm
- Transport, combination truck, long-haul, diesel powered: 232.597 kg*km; = SCTG31_longHaul_kgkm
- Transport, train, diesel powered: 15.5885 kg*km; = SCTG31_rail_kgkm
- Transport, ocean freighter, average fuel mix: 0.746217 kg*km; = SCTG31_greatLakes_kgkm
- Transport, barge, average fuel mix: 1.09764 kg*km; = SCTG31_inlandWater_kgkm
- Transport, aircraft, freight: 2.07054 kg*km; = SCTG31_air_kgkm
- Transport, ocean freighter, average fuel mix: 0.0615769 kg*km; = SCTG31_deepSea_kgkm
- Transport, pipeline, unspecified petroleum products: 0.000415419 kg*km; = SCTG31_pipeline_kgkm

## Inventory method
Not applicable; this process contains only technosphere flows. This process contains the mixture of transport processes used to model transport of a specific commodity moved within the U.S.

## Modelling constants
Approaches to compile and estimate average transport practices for U.S. commodities from Commodity Flow Survey data are described in the linked methodology document. Transportation technologies were mapped to those available in USLCI.

## Completeness
This process contains no elementary flows. All transportation modes included in the CFS data for each commodity are included.

## Data selection
Data were retrieved for all available commodities.

## Data treatment
Estimation of the total mass of each commodity shipped per transportation mode was completed based on the 2017 CFS PUF User Guide instructions. Estimation of average shipment distance for each commodity transport mode was completed based on the 2017 CFS PUF User Guide instructions. The shipment distances produced based on the calculation from the 2017 CFS PUF User Guide are weighted based on the mass fraction of the mass of commodity shipped by each mode. A more detailed discussion of the methodology is included in the methodology document.

## Data collection
Data from the 2017 CFS PUF were accessed in Q4 of 2025. These data will remain unchanged. The CFS data are updated with each census but are released as separate data sets.

## Sampling procedure
The uncertainty included in the CFS PUF was not captured.

## Use advice
These data are intended to be used as proxies for commodity specifc transport inputs when primary or more relevant data are not available. It is recommended that the user review the transportation modes present in each process and make a judgement call about which modes are relevant for the use case and which modes should be excluded. These processes only represent the domestic transport of commodities within the United States.

## Intended application
This process is intended to provide representative mixes of transportation for commodities in the US.

## Project
This dataset was developed by the Federal LCA Commons Data Curator Eastern Research Group, Inc. (ERG) under subcontract (SUB-2024-10066) to the National Renewable Energy Laboratory under Department of Energy (DOE) Prime Contract No. DE-AC36-08GO28308. The work is funded by DOE's Advanced Materials & Manufacturing Technologies Office (AMMTO).

## Review Dependent internal review
ERG internally reviewed the programs, underlying assumptions, and mathematical operations required to produce the JSON-LD files for addition to USLCI.

## Sources
- US Census Bureau (2017) CFS Public Use File
- US Census Bureau (2017) CFS Public Use File User Guide
