# Transport; average mix; agricultural products (excludes animal feed, cereal grains, and forage products)

Dataset: openLCA process, unit process
Category: 48-49: Transportation and Warehousing / Commodity Transport
Geography: United States of America (the)
Time period: 2017-01-01 to 2017-12-31
Allocation method: physical allocation
Data quality: US EPA - Process Pedigree Matrix (4;1)
Exchange data quality scheme: US EPA - Flow Pedigree Matrix
Generated by: ERG
Owner: US Census Bureau
Published in: ERG (2025) US Average Commodity Transport
restrictionsDescription: The Commodity Flow Survey Public Use File is a work of the United States Government and is therefore not subject to copyright protection under Title 17 U.S.C. §105. This provision states: ‘Copyright protection under this title is not available for any work of the United States Government.’ Accordingly, the data are in the public domain and may be used freely, with attribution recommended for transparency.
These U.S. LCI Database Project data ("Data") are provided by the National Renewable Energy Laboratory ("NREL"), operated by the Alliance for Sustainable Energy, LLC ("Alliance") for the US Department of Energy ("DOE") under Contract No. DE-AC36-08GO28308. The United States Government (the "Government") retains and the user acknowledges that the Government retains a non-exclusive, paid-up, irrevocable, worldwide license to publish or reproduce the published form of these data, or allow others to do so, for Government purposes.
Access to and use of these Data shall impose the following obligations on the user, as set forth in this Agreement. The user is granted the right, without any fee or cost, to use, copy, modify, alter, enhance and distribute these Data for any purpose whatsoever, provided that this entire notice appears in all copies of the Data. Any modification, alteration or enhancement of these data shall be identified and documented by the user. Further, the user agrees to credit the DOE/NREL/Alliance in any publication that results from the use of these Data. The names DOE/NREL/Alliance, however, may not be used in any advertising or publicity to endorse or promote any products or commercial entities unless specific written permission is obtained from DOE/NREL/Alliance. The user also understands that DOE/NREL/Alliance is not obligated to provide the user with any support, consulting, training or assistance of any kind with regard to the use of these Data or to provide the user with any updates, revisions or new versions of these Data.
YOU AGREE TO INDEMNIFY THE GOVERNMENT AND DOE/NREL/ALLIANCE, AND ITS SUBSIDIARIES, AFFILIATES, OFFICERS, AGENTS, AND EMPLOYEES AGAINST ANY CLAIM OR DEMAND, INCLUDING REASONABLE ATTORNEYS' FEES, RELATED TO YOUR USE OF THESE DATA. THESE DATA ARE PROVIDED BY DOE/NREL/ALLIANCE "AS IS" AND ANY EXPRESS OR IMPLIED WARRANTIES, INCLUDING BUT NOT LIMITED TO, THE IMPLIED WARRANTIES OF MERCHANTABILITY AND FITNESS FOR A PARTICULAR PURPOSE ARE DISCLAIMED. IN NO EVENT SHALL THE GOVERNMENT OR DOE/NREL/ALLIANCE BE LIABLE FOR ANY SPECIAL, INDIRECT OR CONSEQUENTIAL DAMAGES OR ANY DAMAGES WHATSOEVER, INCLUDING BUT NOT LIMITED TO CLAIMS ASSOCIATED WITH THE LOSS OF DATA OR PROFITS, WHICH MAY RESULT FROM AN ACTION IN CONTRACT, NEGLIGENCE OR OTHER TORTIOUS CLAIM THAT ARISES OUT OF OR IN CONNECTION WITH THE ACCESS, USE OR PERFORMANCE OF THESE DATA.

## General comment
Average transport distances per transportation mode (i.e. truck, rail, water) for the commodity 'Agricultural Products (excludes Animal Feed, Cereal Grains, and Forage Products)'. Commodity categories are defined according to the Standard Classification of Transported Goods (SCTG). The SCTG code for 'Agricultural Products (excludes Animal Feed, Cereal Grains, and Forage Products)' is '03'. Specific commodities that are included in each category can be found in the SCTG Commodity Code Manual which is referenced in the methodology document. The system boundaries for these processes are manufacturing or wholesale gate to consumer. Data are sourced from the 2017 Commodity Flow Survey Public Use File. These data represent U.S. average shipment characteristics per commodity. These data are intended to model transportation of domestically transported and consumed goods. Shipment data for commodities that were ultimately exported from the United States were not included.

## Technology
This data represents the standard transportation technology used in the U.S. for all modes excluding pipeline. The current default provider for pipeline entries represent the transportation of crude petroleum which was selected as a proxy for SCTG Code 20 (Basic Chemicals) and SCTG Code 31 (Non-Metallic Minerals). Currently, there are no pipeline processes in USLCI that specifically relate to chemical or mineral transport.

## Geography
This process represents the average U.S. shipment for the commodity.

## Time period
This process reflects a sample of four weeks of transportation activities, one week per quarter, over the course of 2017.

## Parameters
- SCTG03_longHaul_dist: 401.19
  km
- SCTG03_longHaul_mass_frac: 0.493687
  fraction of all commodity shipped by current mode
- SCTG03_longHaul_kgkm; = SCTG03_longHaul_dist*SCTG03_longHaul_mass_frac
  kg*km; average mass distance per shipment
- SCTG03_lightTruck_dist: 71.37
  km
- SCTG03_lightTruck_mass_frac: 0.274167
  fraction of all commodity shipped by current mode
- SCTG03_lightTruck_kgkm; = SCTG03_lightTruck_dist*SCTG03_lightTruck_mass_frac
  kg*km; average mass distance per shipment
- SCTG03_rail_dist: 1044.15
  km
- SCTG03_rail_mass_frac: 0.116427
  fraction of all commodity shipped by current mode
- SCTG03_rail_kgkm; = SCTG03_rail_dist*SCTG03_rail_mass_frac
  kg*km; average mass distance per shipment
- SCTG03_inlandWater_dist: 1539.77
  km
- SCTG03_inlandWater_mass_frac: 0.115573
  fraction of all commodity shipped by current mode
- SCTG03_inlandWater_kgkm; = SCTG03_inlandWater_dist*SCTG03_inlandWater_mass_frac
  kg*km; average mass distance per shipment
- SCTG03_air_dist: 3136.26
  km
- SCTG03_air_mass_frac: 9.56851e-5
  fraction of all commodity shipped by current mode
- SCTG03_air_kgkm; = SCTG03_air_dist*SCTG03_air_mass_frac
  kg*km; average mass distance per shipment
- SCTG03_deepSea_dist: 1752.8
  km
- SCTG03_deepSea_mass_frac: 5.00608e-5
  fraction of all commodity shipped by current mode
- SCTG03_deepSea_kgkm; = SCTG03_deepSea_dist*SCTG03_deepSea_mass_frac
  kg*km; average mass distance per shipment

## Reference product
- Commodity transport; at consumer: 1 kg

## Inputs
All rows: data quality (2,3,1,1,3)
- Transport, combination truck, long-haul, diesel powered: 198.062 kg*km; = SCTG03_longHaul_kgkm
- Transport, light commercial truck, diesel powered: 19.5673 kg*km; = SCTG03_lightTruck_kgkm
- Transport, train, diesel powered: 121.567 kg*km; = SCTG03_rail_kgkm
- Transport, barge, average fuel mix: 177.956 kg*km; = SCTG03_inlandWater_kgkm
- Transport, aircraft, freight: 0.300093 kg*km; = SCTG03_air_kgkm
- Transport, ocean freighter, average fuel mix: 0.0877466 kg*km; = SCTG03_deepSea_kgkm

## Inventory method
Not applicable; this process contains only technosphere flows. This process contains the mixture of transport processes used to model transport of a specific commodity moved within the U.S.

## Modelling constants
Approaches to compile and estimate average transport practices for U.S. commodities from Commodity Flow Survey data are described in the linked methodology document. Transportation technologies were mapped to those available in USLCI.

## Completeness
This process contains no elementary flows. All transportation modes included in the CFS data for each commodity are included.

## Data selection
Data were retrieved for all available commodities.

## Data treatment
Estimation of the total mass of each commodity shipped per transportation mode was completed based on the 2017 CFS PUF User Guide instructions. Estimation of average shipment distance for each commodity transport mode was completed based on the 2017 CFS PUF User Guide instructions. The shipment distances produced based on the calculation from the 2017 CFS PUF User Guide are weighted based on the mass fraction of the mass of commodity shipped by each mode. A more detailed discussion of the methodology is included in the methodology document.

## Data collection
Data from the 2017 CFS PUF were accessed in Q4 of 2025. These data will remain unchanged. The CFS data are updated with each census but are released as separate data sets.

## Sampling procedure
The uncertainty included in the CFS PUF was not captured.

## Use advice
These data are intended to be used as proxies for commodity specifc transport inputs when primary or more relevant data are not available. It is recommended that the user review the transportation modes present in each process and make a judgement call about which modes are relevant for the use case and which modes should be excluded. These processes only represent the domestic transport of commodities within the United States.

## Intended application
This process is intended to provide representative mixes of transportation for commodities in the US.

## Project
This dataset was developed by the Federal LCA Commons Data Curator Eastern Research Group, Inc. (ERG) under subcontract (SUB-2024-10066) to the National Renewable Energy Laboratory under Department of Energy (DOE) Prime Contract No. DE-AC36-08GO28308. The work is funded by DOE's Advanced Materials & Manufacturing Technologies Office (AMMTO).

## Review Dependent internal review
ERG internally reviewed the programs, underlying assumptions, and mathematical operations required to produce the JSON-LD files for addition to USLCI.

## Sources
- US Census Bureau (2017) CFS Public Use File
- US Census Bureau (2017) CFS Public Use File User Guide
